<?xml version="1.0"?>
<?xml-stylesheet type="text/xsl" href="http://jsbsim.sourceforge.net/JSBSim.xsl"?>
<fdm_config name="RA-5" version="2.0" release="ALPHA"
   xmlns:xsi="http://www.w3.org/2001/XMLSchema-instance"
   xsi:noNamespaceSchemaLocation="http://jsbsim.sourceforge.net/JSBSim.xsd">

 <fileheader>
  <author> Aeromatic v 0.9 </author>
  <filecreationdate> now </filecreationdate>
  <version> 0.0 </version>
  <description> Models an RA-5C. </description>
 </fileheader>

 <metrics>
   <wingarea  unit="FT2">  754.00 </wingarea>
   <wingspan  unit="FT" >   53.10 </wingspan>
   <wing_incidence>          2.00 </wing_incidence>
   <chord     unit="FT" >   14.20 </chord>
   <htailarea unit="FT2">  150.80 </htailarea>
   <htailarm  unit="FT" >   30.64 </htailarm>
   <vtailarea unit="FT2">  135.72 </vtailarea>
   <vtailarm  unit="FT" >   30.64 </vtailarm>
   <location name="AERORP" unit="IN">
     <x> 551.0 </x>
     <y>   0.0 </y>
     <z>   0.0 </z>
   </location>
   <location name="EYEPOINT" unit="IN">
     <x> 180.0 </x>
     <y>   0.0 </y>
     <z>  38.0 </z>
   </location>
   <location name="VRP" unit="IN">
     <x> 551 </x>
     <y>   0 </y>
     <z>   0 </z>
   </location>
 </metrics>

 <mass_balance>
   <ixx unit="SLUG*FT2">     88000 </ixx>
   <iyy unit="SLUG*FT2">    250000 </iyy>
   <izz unit="SLUG*FT2">    260000 </izz>
   <ixy unit="SLUG*FT2">      1000 </ixy>
   <ixz unit="SLUG*FT2">         0 </ixz>
   <iyz unit="SLUG*FT2">         0 </iyz>
   <emptywt unit="LBS" >     37500 </emptywt>
   <location name="CG" unit="IN">
     <x> 551.0 </x>
     <y>   0.0 </y>
     <z>  -4.0 </z>
   </location>

		<pointmass name="Crew">
			<description>Careful, can be overloaded! Different configurations for different missions!</description>
			<weight unit="LBS">  600.0000 </weight>
			<location name="CREW" unit="IN">
				<x>   300.00 </x>
				<y>     0.00 </y>
				<z>   -54.07 </z>
			</location>
		</pointmass>

		<pointmass name="Warhead">
			<description>Careful, can be overloaded! Different configurations for different missions!</description>
			<weight unit="LBS"> 2065.0000 </weight>
			<location name="Warhead" unit="IN">
				<x>   600.00 </x>
				<y>     0.00 </y>
				<z>   -54.07 </z>
			</location>
		</pointmass>

		<pointmass name="ESM Container">
			<description>Careful, can be overloaded! Different configurations for different missions!</description>
			<weight unit="LBS"> 2065.0000 </weight>
			<location name="CREW" unit="IN">
				<x>   700.00 </x>
				<y>     0.00 </y>
				<z>   -54.07 </z>
			</location>
		</pointmass>
 </mass_balance>

 <ground_reactions>

  <contact type="BOGEY" name="NOSE">
   <location unit="IN">
     <x>  320.00 </x>
     <y>    0.00 </y>
     <z> -112.00 </z>
   </location>
   <static_friction>  0.80 </static_friction>
   <dynamic_friction> 0.50 </dynamic_friction>
   <rolling_friction> 0.02 </rolling_friction>
   <spring_coeff unit="LBS/FT">      24000.0 </spring_coeff>
   <damping_coeff unit="LBS/FT/SEC"> 16000.0 </damping_coeff>
   <max_steer unit="DEG"> 65.00 </max_steer>
   <brake_group>NONE</brake_group>
   <retractable>1</retractable>
 </contact>

  <contact type="BOGEY" name="LEFT_MAIN">
   <location unit="IN">
     <x>  573.00 </x>
     <y>  -84.00 </y>
     <z> -103.00 </z>
   </location>
   <static_friction>  0.80 </static_friction>
   <dynamic_friction> 0.50 </dynamic_friction>
   <rolling_friction> 0.02 </rolling_friction>
   <spring_coeff unit="LBS/FT">      75000.0 </spring_coeff>
   <damping_coeff unit="LBS/FT/SEC"> 35000.0 </damping_coeff>
   <brake_group>LEFT</brake_group>
   <retractable>1</retractable>
 </contact>

  <contact type="BOGEY" name="RIGHT_MAIN">
   <location unit="IN">
     <x>  573.00 </x>
     <y>   84.00 </y>
     <z> -103.00 </z>
   </location>
   <static_friction>  0.80 </static_friction>
   <dynamic_friction> 0.50 </dynamic_friction>
   <rolling_friction> 0.02 </rolling_friction>
   <spring_coeff unit="LBS/FT">      75000.0 </spring_coeff>
   <damping_coeff unit="LBS/FT/SEC"> 35000.0 </damping_coeff>
   <brake_group>RIGHT</brake_group>
   <retractable>1</retractable>
 </contact>

  <contact type="STRUCTURE" name="LEFT_WING">
    <location unit="IN">
     <x>  580 </x>
     <y> -319 </y>
     <z>   10 </z>
    </location>
    <static_friction>  0.80 </static_friction>
    <dynamic_friction> 0.50 </dynamic_friction>
    <spring_coeff unit="LBS/FT">      10000.00 </spring_coeff>
    <damping_coeff unit="LBS/FT/SEC"> 40000.00 </damping_coeff>
 </contact>

  <contact type="STRUCTURE" name="RIGHT_WING">
    <location unit="IN">
     <x>  580 </x>
     <y>  319 </y>
     <z>   10 </z>
    </location>
    <static_friction>  0.80 </static_friction>
    <dynamic_friction> 0.50 </dynamic_friction>
    <spring_coeff unit="LBS/FT">      10000.00 </spring_coeff>
    <damping_coeff unit="LBS/FT/SEC"> 40000.00 </damping_coeff>
 </contact>

 </ground_reactions>

 <propulsion>

   <engine file="J79-GE-10">
    <location unit="IN">
      <x> 0 </x>
      <y> 0 </y>
      <z> 0 </z>
    </location>
    <feed>3</feed>
    <feed>4</feed>
    <feed>5</feed>
    <feed>0</feed>
    <feed>1</feed>
    <feed>2</feed>
    <thruster file="direct">
     <location unit="IN">
       <x> 912 </x>
       <y> -26 </y>
       <z> -12 </z>
     </location>
     <orient unit="DEG">
       <pitch> 0.00 </pitch>
       <roll>  0.00 </roll>
       <yaw>   0.00 </yaw>
     </orient>
    </thruster>
  </engine>

   <engine file="J79-GE-10">
    <location unit="IN">
      <x> 0 </x>
      <y> 0 </y>
      <z> 0 </z>
    </location>
    <feed>3</feed>
    <feed>4</feed>
    <feed>5</feed>
    <feed>6</feed>
    <feed>7</feed>
    <feed>2</feed>
    <thruster file="direct">
     <location unit="IN">
       <x> 912 </x>
       <y>  26 </y>
       <z> -12 </z>
     </location>
     <orient unit="DEG">
       <pitch> 0.00 </pitch>
       <roll>  0.00 </roll>
       <yaw>   0.00 </yaw>
     </orient>
    </thruster>
  </engine>

  <!-- Outer drop tank left -->
  <tank type="FUEL" number="0">
     <location unit="IN">
       <x> 551 </x>
       <y>   0  </y>
       <z>   0  </z>
     </location>
	<priority>2</priority>
     <type>JP-5</type>
     <capacity unit="LBS"> 2800.00 </capacity>
     <contents unit="LBS"> 2800.00 </contents>
  </tank>

  <!-- Inner drop tanks left -->
  <tank type="FUEL" number="1">
     <location unit="IN">
       <x> 551 </x>
       <y>   0  </y>
       <z>   0  </z>
     </location>
	<priority>2</priority>
     <type>JP-5</type>
     <capacity unit="LBS"> 2800.00 </capacity>
     <contents unit="LBS"> 2800.00 </contents>
  </tank>

  <!-- Center -->
  <tank type="FUEL" number="2">
     <location unit="IN">
       <x> 550 </x>
       <y>   0  </y>
       <z>   0  </z>
     </location>
	<priority>3</priority>
     <type>JP-5</type>
     <capacity unit="LBS"> 15225.00 </capacity>
     <contents unit="LBS"> 15225.00 </contents>
     <standpipe unit="LBS"> 1800.00 </standpipe>
  </tank>

  <!-- Linear Storage #1 -->
  <tank type="FUEL" number="3">
     <location unit="IN">
       <x> 500 </x>
       <y>   0  </y>
       <z>   0  </z>
     </location>
	<priority>1</priority>
     <type>JP-5</type>
     <capacity unit="LBS"> 2065.00 </capacity>
     <contents unit="LBS"> 2065.00 </contents>
     <standpipe unit="LBS"> 100.00 </standpipe>
  </tank>

  <!-- Linear Storage #2 -->
  <tank type="FUEL" number="4">
     <location unit="IN">
       <x> 600 </x>
       <y>   0  </y>
       <z>   0  </z>
     </location>
	<priority>1</priority>
     <type>JP-5</type>
     <capacity unit="LBS"> 2065.00 </capacity>
     <contents unit="LBS"> 2065.00 </contents>
     <standpipe unit="LBS"> 100.00 </standpipe>
  </tank>

  <!-- Linear Storage #3 -->
  <tank type="FUEL" number="5">
     <location unit="IN">
       <x> 700 </x>
       <y>   0  </y>
       <z>   0  </z>
     </location>
	<priority>1</priority>
     <type>JP-5</type>
     <capacity unit="LBS"> 2065.00 </capacity>
     <contents unit="LBS"> 2065.00 </contents>
     <standpipe unit="LBS"> 100.00 </standpipe>
  </tank>

  <!-- Inner drop tanks left -->
  <tank type="FUEL" number="6">
     <location unit="IN">
       <x> 551 </x>
       <y>   0  </y>
       <z>   0  </z>
     </location>
	<priority>2</priority>
     <type>JP-5</type>
     <capacity unit="LBS"> 2800.00 </capacity>
     <contents unit="LBS"> 2800.00 </contents>
  </tank>

  <!-- Outer drop tanks left -->
  <tank type="FUEL" number="7">
     <location unit="IN">
       <x> 551 </x>
       <y>   0  </y>
       <z>   0  </z>
     </location>
	<priority>2</priority>
     <type>JP-5</type>
     <capacity unit="LBS"> 2800.00 </capacity>
     <contents unit="LBS"> 2800.00 </contents>
  </tank>

  <dump-rate unit="LBS/MIN"> 2500 </dump-rate>

 </propulsion>

 <system file="holdback"/>
 <system file="hook"/>
 <system file="catapult"/>
 <system file="BLC"/>
 <system file="refuel"/>
 <system file="gear"/>
 <system file="flaps"/>
 <system file="speedbrakes"/>
 <system file="FCS-pitch"/>
 <system file="FCS-roll"/>
 <system file="FCS-yaw"/>
 <system file="NWS"/>
 <system file="alpha_buffet"/>
 <system file="dump"/>
<!-- <system file="crash-detect"/> -->
 <system file="radar"/>
 <system file="armament"/>
 <system file="drag"/>
 <system file="beacon"/>
 <system file="canopy"/>
 <!-- system file="reverser"/ -->
 <system file="wing-fold"/>
 <system file="cat_workaround"/>
 <system file="particles"/>

 <flight_control name="FCS"/>

 <aerodynamics>

    <function name="aero/wing-area">
      <description>Wing-area-including-folding</description>
      <difference>
         <property>metrics/Sw-sqft</property>
         <product>
              <property>metrics/Sw-sqft</property>
              <property>fcs/wing-fold-pos-norm</property>
              <value>0.6</value>
         </product>
      </difference>
    </function>

        <function name="aero/function/kCDge">
            <description>Change_in_drag_due_to_ground_effect</description>
            <product>
                  <table>
                      <independentVar>aero/h_b-mac-ft</independentVar>
                      <tableData>
                          0.0000	0.4800
                          0.1000	0.5150
                          0.1500	0.6290
                          0.2000	0.7090
                          0.3000	0.8150
                          0.4000	0.8820
                          0.5000	0.9280
                          0.6000	0.9620
                          0.7000	0.9880
                          0.8000	1.0000
                      </tableData>
                  </table>
            </product>
        </function>

        <function name="aero/function/kCLge">
            <description>Change_in_lift_due_to_ground_effect</description>
            <product>
                  <table>
                      <independentVar>aero/h_b-mac-ft</independentVar>
                      <tableData>
                          0.0000	1.2030
                          0.1000	1.1270
                          0.1500	1.0900
                          0.2000	1.0730
                          0.3000	1.0460
                          0.4000	1.0550
                          0.5000	1.0190
                          0.6000	1.0130
                          0.7000	1.0080
                          0.8000	1.0060
                          0.9000	1.0030
                          1.0000	1.0020
                          1.1000	1.0000
                      </tableData>
                  </table>
            </product>
        </function>


  <axis name="LIFT">

    <function name="aero/coefficient/CLalpha">
      <description>Lift_due_to_alpha</description>
      <product>
          <property>aero/qbar-psf</property>
          <property>aero/wing-area</property>
          <property>aero/function/kCLge</property>
          <table>
            <independentVar lookup="row">aero/alpha-rad</independentVar>
            <tableData>
              -0.20 -0.74
               0.00  0.18
               0.26  1.10
               0.40  1.05
               0.60  0.50
               1.30  0.15
            </tableData>
          </table>
      </product>
    </function>

    <function name="aero/coefficient/dCLflap">
       <description>Delta_Lift_due_to_flaps</description>
       <product>
           <property>aero/qbar-psf</property>
           <property>metrics/Sw-sqft</property>
           <property>fcs/flap-pos-norm</property>
           <value> 0.36 </value>
       </product>
    </function>

    <function name="aero/coefficient/CLde">
       <description>Lift_due_to_Elevator_Deflection</description>
       <product>
           <property>aero/qbar-psf</property>
           <property>metrics/Sw-sqft</property>
           <property>fcs/elevator-pos-rad</property>
           <value>0.28</value>
       </product>
    </function>

    <function name="aero/coefficient/dCLBLC">
       <description>Delta_Lift_due_to_BLC</description>
       <product>
           <property>aero/qbar-psf</property>
           <property>metrics/Sw-sqft</property>
           <property>systems/BLC/active</property>
           <property>fcs/flap-pos-norm</property>
           <value> 0.1 </value>
       </product>
    </function>

    <function name="aero/coefficient/buffet">
       <description>Buffet at high alpha</description>
         <product>
           <property>systems/alpha_buffet/sine_wave</property>
           <property>systems/alpha_buffet/strength</property>
         </product>
    </function>

  </axis>

  <axis name="DRAG">

    <function name="aero/coefficient/CD0">
       <description>Basic_drag</description>
       <product>
          <property>aero/qbar-psf</property>
          <property>metrics/Sw-sqft</property>
          <property>systems/drag/index</property>
          <table>
            <independentVar lookup="row">aero/alpha-rad</independentVar>
            <tableData>
             -1.57    1.500
             -0.26    0.028
              0.00    0.018
              0.26    0.028
              1.57    1.500
            </tableData>
          </table>
       </product>
    </function>

    <function name="aero/coefficient/CDi">
       <description>Induced_drag</description>
         <product>
           <property>aero/qbar-psf</property>
           <property>metrics/Sw-sqft</property>
           <property>aero/cl-squared</property>
           <property>aero/function/kCDge</property>
           <value>0.11</value>
         </product>
    </function>

    <function name="aero/coefficient/CDmach">
       <description>Drag_due_to_mach</description>
        <product>
          <property>aero/qbar-psf</property>
          <property>metrics/Sw-sqft</property>
          <table>
            <independentVar lookup="row">velocities/mach</independentVar>
            <tableData>
                0.00      0.000
                0.81      0.000
                1.10      0.018
                1.40      0.008
                2.00      0.003
            </tableData>
          </table>
        </product>
    </function>

    <function name="aero/coefficient/CDflap">
       <description>Drag_due_to_flaps</description>
         <product>
           <property>aero/qbar-psf</property>
           <property>metrics/Sw-sqft</property>
           <table>
            <independentVar lookup="row">fcs/flap-pos-norm</independentVar>
            <tableData>
               0.0  0.0
               0.5  0.025
               1.0  0.11
            </tableData>
           </table>
         </product>
    </function>

    <function name="aero/coefficient/CDgear">
       <description>Drag_due_to_gear</description>
         <product>
           <property>aero/qbar-psf</property>
           <property>metrics/Sw-sqft</property>
           <property>gear/gear-pos-norm</property>
           <value>0.024</value>
         </product>
    </function>

    <function name="aero/coefficient/CDsb">
       <description>Drag_due_to_speedbrakes</description>
         <product>
           <property>aero/qbar-psf</property>
           <property>metrics/Sw-sqft</property>
           <property>fcs/speedbrake-pos-norm</property>
           <value>0.03</value>
         </product>
    </function>

    <function name="aero/coefficient/CDbeta">
       <description>Drag_due_to_sideslip</description>
       <product>
          <property>aero/qbar-psf</property>
          <property>metrics/Sw-sqft</property>
          <table>
            <independentVar lookup="row">aero/beta-rad</independentVar>
            <tableData>
              -1.57    1.230
              -0.26    0.050
               0.00    0.000
               0.26    0.050
               1.57    1.230
            </tableData>
          </table>
       </product>
    </function>

    <function name="aero/coefficient/CDde">
       <description>Drag_due_to_Elevator_Deflection</description>
       <product>
           <property>aero/qbar-psf</property>
           <property>metrics/Sw-sqft</property>
           <abs><property>fcs/elevator-pos-norm</property></abs>
           <value>0.035</value>
       </product>
    </function>

  </axis>

  <axis name="SIDE">

    <function name="aero/coefficient/CYb">
       <description>Side_force_due_to_beta</description>
       <product>
           <property>aero/qbar-psf</property>
           <property>metrics/Sw-sqft</property>
           <property>aero/beta-rad</property>
           <value>-1</value>
       </product>
    </function>

  </axis>

  <axis name="ROLL">

    <function name="aero/coefficient/Clb">
       <description>Roll_moment_due_to_beta</description>
       <product>
           <property>aero/qbar-psf</property>
           <property>metrics/Sw-sqft</property>
           <property>metrics/bw-ft</property>
           <property>aero/beta-rad</property>
           <value>-0.05</value>
       </product>
    </function>

    <function name="aero/coefficient/Clp">
       <description>Roll_moment_due_to_roll_rate</description>
       <product>
           <property>aero/qbar-psf</property>
           <property>metrics/Sw-sqft</property>
           <property>metrics/bw-ft</property>
           <property>aero/bi2vel</property>
           <property>velocities/p-aero-rad_sec</property>
           <value>-0.4</value>
       </product>
    </function>

    <function name="aero/coefficient/Clr">
       <description>Roll_moment_due_to_yaw_rate</description>
       <product>
           <property>aero/qbar-psf</property>
           <property>metrics/Sw-sqft</property>
           <property>metrics/bw-ft</property>
           <property>aero/bi2vel</property>
           <property>velocities/r-aero-rad_sec</property>
           <value>0.13</value>
       </product>
    </function>

    <function name="aero/coefficient/Clda">
       <description>Roll_moment_due_to_aileron</description>
       <product>
          <property>aero/qbar-psf</property>
          <property>metrics/Sw-sqft</property>
          <property>metrics/bw-ft</property>
          <property>fcs/left-aileron-pos-rad</property>
          <table>
            <independentVar lookup="row">velocities/mach</independentVar>
            <tableData>
              0.0    0.120
              2.0    0.040
            </tableData>
          </table>
       </product>
    </function>

    <function name="aero/coefficient/Cldr">
       <description>Roll_moment_due_to_rudder</description>
       <product>
           <property>aero/qbar-psf</property>
           <property>metrics/Sw-sqft</property>
           <property>metrics/bw-ft</property>
           <property>fcs/rudder-pos-rad</property>
           <table>
             <independentVar lookup="row">aero/alpha-rad</independentVar>
             <tableData>
               0.00   0.002
               0.13   0.003
               0.18   0.008
               0.22   0.011
             </tableData>
           </table>
       </product>
    </function>

  </axis>

  <axis name="PITCH">

    <function name="aero/coefficient/Cmalpha">
       <description>Pitch_moment_due_to_alpha</description>
       <product>
           <property>aero/qbar-psf</property>
           <property>metrics/Sw-sqft</property>
           <property>metrics/cbarw-ft</property>
           <property>aero/alpha-rad</property>
           <value>-0.3</value>
       </product>
    </function>

    <function name="aero/coefficient/Cmde">
       <description>Pitch_moment_due_to_elevator</description>
       <product>
          <property>aero/qbar-psf</property>
          <property>metrics/Sw-sqft</property>
          <property>metrics/cbarw-ft</property>
          <property>fcs/elevator-pos-rad</property>
          <table>
            <independentVar lookup="row">velocities/mach</independentVar>
            <tableData>
              0.0     -0.70
              2.0     -0.20
            </tableData>
          </table>
       </product>
    </function>

    <function name="aero/coefficient/Cmq">
       <description>Pitch_moment_due_to_pitch_rate</description>
       <product>
           <property>aero/qbar-psf</property>
           <property>metrics/Sw-sqft</property>
           <property>metrics/cbarw-ft</property>
           <property>aero/ci2vel</property>
           <property>velocities/q-aero-rad_sec</property>
           <value>-18</value>
       </product>
    </function>

    <function name="aero/coefficient/Cmadot">
       <description>Pitch_moment_due_to_alpha_rate</description>
       <product>
           <property>aero/qbar-psf</property>
           <property>metrics/Sw-sqft</property>
           <property>metrics/cbarw-ft</property>
           <property>aero/ci2vel</property>
           <property>aero/alphadot-rad_sec</property>
           <value>-9</value>
       </product>
    </function>

  </axis>

  <axis name="YAW">

    <function name="aero/coefficient/Cnb">
       <description>Yaw_moment_due_to_beta</description>
       <product>
           <property>aero/qbar-psf</property>
           <property>metrics/Sw-sqft</property>
           <property>metrics/bw-ft</property>
           <property>aero/beta-rad</property>
           <value>0.12</value>
       </product>
    </function>

    <function name="aero/coefficient/Cnr">
       <description>Yaw_moment_due_to_yaw_rate</description>
       <product>
           <property>aero/qbar-psf</property>
           <property>metrics/Sw-sqft</property>
           <property>metrics/bw-ft</property>
           <property>aero/bi2vel</property>
           <property>velocities/r-aero-rad_sec</property>
           <value>-0.15</value>
       </product>
    </function>

    <function name="aero/coefficient/Cndr">
       <description>Yaw_moment_due_to_rudder</description>
       <product>
           <property>aero/qbar-psf</property>
           <property>metrics/Sw-sqft</property>
           <property>metrics/bw-ft</property>
           <property>fcs/rudder-pos-rad</property>
           <value>-0.08</value>
       </product>
    </function>

  </axis>

 </aerodynamics>


 <external_reactions>

  <force name="catapult" frame="LOCAL">
   <location unit="IN">
     <x> -260.0 </x>
     <y>    0.0 </y>
     <z>  -14.0 </z>
   </location>
   <direction>
     <x>   -0.9612617 </x>
     <y>   -0.2756374 </y>
     <z>    0.0 </z>
   </direction>
  </force>

  <force name="holdback" frame="BODY">
   <location unit="IN">
     <x> -250.0 </x>
     <y>    0.0 </y>
     <z>  -30.0 </z>
   </location>
   <direction>
     <x>   -1.0 </x>
     <y>    0.0 </y>
     <z>    0.0 </z>
   </direction>
  </force>

  <force name="hook" frame="BODY">
   <location unit="IN">
     <x>  800.0 </x>
     <y>    0.0 </y>
     <z>  -30.0 </z>
   </location>
   <direction>
     <x>  -0.9995 </x>
     <y>   0.0    </y>
     <z>   0.01 </z>
   </direction>
  </force>

 </external_reactions>


</fdm_config>
